# Начальные данные
Vср := 0.14
λ := 5.8
n1 := 0.53
ω_1 := 2*π*n1 = 3.33009
f := 2*π/3
P_C1max := 490.5
P_C2max := 686.7
F_Mmax := 490.5
F_Д := 245.25
G_2 := 117.72
G_3 := 392.4
J_2S := 0.069
# 1.1 Определение размеров механизма
l_AO := Vср/(4*n1) = 0.0660377
l_AB := λ*l_AO = 0.383019
l_AS2 := l_AB*0.275 = 0.10533
# 2. Вычисление передаточных функций механизма
# 2.1. Функции положения.
X_A(φ) := -l_AO*cos(φ)
X_A(f) = 0.0330189
Y_A(φ) := l_AO*sin(φ)
Y_A(f) = 0.0571904
φ_2(φ) := asin(sin(φ)*l_AO/l_AB)
φ_2(f) = 0.149875
X_B(φ) := l_AB*cos(φ_2(φ)) + X_A(φ)
X_B(f) = 0.411744
Y_B(φ) := 0
Y_B(f) = 0
X_S2(φ) := X_A(φ) + l_AS2*cos(φ_2(φ))
X_S2(f) = 0.137168
Y_S2(φ) := Y_A(φ) - l_AS2*sin(φ_2(φ))
Y_S2(f) = 0.041463
# 2.2. Кинематические передаточные функции
# скорости (аналоги скоростей):
V_qS2X(φ) := ω_1*d/dφ(X_S2(φ))
V_qS2X(f) = 0.195015
V_qS2Y(φ) := ω_1*d/dφ(Y_S2(φ))
V_qS2Y(f) = -0.0797179
V_qS2(φ) := sqrt(V_qS2X(φ)^2 + V_qS2Y(φ)^2)
V_qS2(f) = 0.210679
V_qAX(φ) := ω_1*d/dφ(X_A(φ))
V_qAX(f) = 0.190449
V_qAY(φ) := ω_1*d/dφ(Y_A(φ))
V_qAY(f) = -0.109956
V_qA(φ) := sqrt(V_qAX(φ)^2 + V_qAY(φ)^2)
V_qA(f) = 0.219911
V_qBX(φ) := ω_1*d/dφ(X_B(φ))
V_qBX(f) = 0.207053
V_qB(φ) := |V_qBX(φ)|
V_qB(f) = 0.207053
ω_q2(φ) := (ω_1*d/dφ(φ_2(φ)))
ω_q2(f) = -0.290331
ω_2(φ) := ω_q2(φ)
φ := 0, .05 .. 2*π
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X := [X_B(f); X_S2(f); X_A(f); 0]
Y := [Y_B(f); Y_S2(f); Y_A(f); 0]
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# 1.3 Построение графика силы Pc
L_1 := 2*X_B(0) = 0.633962
S_B(φ) := X_B(φ) - X_B(0)
P_C1(φ) :=
    P_C1max if φ < π
    0 if φ ≥ π
P_C2(φ) :=
    -P_C2max/L_1*S_B(φ) + P_C2max if φ < π
    0 if φ ≥ π
P_C3(φ) := F_Mmax/L_1*S_B(φ) + F_Д
P_C(φ) := P_C1(φ) + P_C2(φ) + P_C3(φ)
φ := 0, .05 .. 2*π
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.
M_CPR(φ) := -P_C(φ)*V_qB(φ)/ω_1
M_DPR := -1/(2*π)*integral(M_CPR(φ), φ = 0 .. 2*π) = 35.7002
M_EPR(φ) := M_CPR(φ) + M_DPR
φ := 0, .05 .. 2*π
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A_E(φ) := integral(M_EPR(φ), φ = 0 .. φ)
φ := 0, .05 .. 2*π
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m_2 := G_2/9.8 = 12.0122
m_3 := G_3/9.8 = 40.0408
U_21(φ) := ω_2(φ)/ω_1
U_21(0) = 0.172414
U_21(π/2) = 0
J_PPR(φ) := m_3*V_qS2(φ)^2
J_3PR(φ) := m_3*V_qB(φ)^2
J_2BPR(φ) := J_2S*U_21(φ)^2
J_2PR(φ) := J_2PR(φ) + J_3PR(φ) + J_2BPR(φ)
T_2(φ) := J_2PR(φ)*ω_1^2/2
φ := 0, .05 .. 2*π
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